// SBML level 3 version 1

model lipid_metabolism_L3v1()
  // Diacylglycerol and Triacylglycerol Biosynthesis (inferred)
  // This SBML Level 3 Version 1 model was generated from the provided lipid metabolism drawing. Reaction directions, stoichiometries, and kinetic rate constants are inferred and serve as placeholders. Enzymes are included as modifier species. Replace kinetics and parameter values with experimental data as required.

  // Compartments:
  compartment cytosol = 1;
  compartment vacuole = 1;
  compartment mitochondrion = 1;

  // Species:
  species TG_18_0_18_1_20_1_c in cytosol = 1/cytosol; TG_18_0_18_1_20_1_c is "TG(18:0/18:1(11Z)/20:1(11Z)) cytosol";
  species DG_18_0_18_1_c in cytosol = 0.5/cytosol; DG_18_0_18_1_c is "DG(18:0/18:1/0:0) cytosol";
  species MG_0_0_18_1_c in cytosol = 0.05/cytosol; MG_0_0_18_1_c is "MG(0:0/18:1(11Z)/0:0) cytosol";
  species MG_18_1_0_0_c in cytosol = 0.05/cytosol; MG_18_1_0_0_c is "MG(18:1(11Z)/0:0/0:0) cytosol";
  species glycerol_c in cytosol = 0.2/cytosol; glycerol_c is "Glycerol cytosol";
  species glycerol3p_c in cytosol = 0; glycerol3p_c is "Glycerol-3-phosphate cytosol";
  species glyceronep_c in cytosol = 0; glyceronep_c is "Glycerone phosphate cytosol";
  species eicosenoic_c in cytosol = 0.5/cytosol; eicosenoic_c is "11Z-Eicosenoic acid cytosol";
  species stearic_c in cytosol = 0.5/cytosol; stearic_c is "Stearic acid cytosol";
  species cis_vaccenic_c in cytosol = 0.5/cytosol; cis_vaccenic_c is "cis-Vaccenic acid cytosol";
  species quinol_m in mitochondrion = 1/mitochondrion; quinol_m is "electron-transfer quinol mitochondrion";
  species quinone_m in mitochondrion = 0; quinone_m is "electron-transfer quinone mitochondrion";
  species ATP_c in cytosol = 2/cytosol; ATP_c is "ATP cytosol";
  species ADP_c in cytosol = 0.5/cytosol; ADP_c is "ADP cytosol";
  species $H2O_c in cytosol = 55.5/cytosol; H2O_c is "H2O cytosol";
  species H_c in cytosol = 1/cytosol; H_c is "Hplus cytosol";
  species unknown1_c in cytosol = 0; unknown1_c is "Unknown1 cytosol";
  species unknown2_c in cytosol = 0; unknown2_c is "Unknown2 cytosol";
  species TG_18_0_18_1_20_1_v in vacuole = 0; TG_18_0_18_1_20_1_v is "TG vacuole";
  species glycerol_m in mitochondrion = 0; glycerol_m is "Glycerol mitochondrion";
  species SDP1_protein in cytosol = 0.01/cytosol; SDP1_protein is "SDP1 enzyme";
  species DSEL_protein in cytosol = 0.01/cytosol; DSEL_protein is "DSEL enzyme";
  species GLPK_protein in cytosol = 0.01/cytosol; GLPK_protein is "GLPK enzyme";
  species SDP6_protein in cytosol = 0.01/cytosol; SDP6_protein is "SDP6 enzyme";

  // Parameters:
  k_TG_hydrolysis = 0.1;
  k_DG_to_MG = 0.05;
  k_MG_to_glycerol = 0.05;
  k_gly_to_gly3p = 0.2;
  k_gly3p_to_glyonep = 0.05;
  k_DG_acylation = 0.08;
  k_quinol_oxidation = 0.1;
  k_transport_TG_vacuole = 0.01;
  k_transport_glycerol_mito = 0.01;

  // Reactions:
  // Inferred from diagram: TG hydrolysis to DG + 11Z-Eicosenoic; SDP1 shown as catalyst.
  TG_hydrolysis_by_SDP1: TG_18_0_18_1_20_1_c => DG_18_0_18_1_c + eicosenoic_c; k_TG_hydrolysis*TG_18_0_18_1_20_1_c;  // modifiers: SDP1_protein, unknown1_c
  // Inferred DG lipase activity producing MG and a free fatty acid; DSEL indicated in diagram.
  DG_to_MG: DG_18_0_18_1_c => MG_0_0_18_1_c + stearic_c; k_DG_to_MG*DG_18_0_18_1_c;  // modifiers: DSEL_protein
  MG_to_glycerol: MG_0_0_18_1_c => glycerol_c + cis_vaccenic_c; k_MG_to_glycerol*MG_0_0_18_1_c;  // modifiers: SDP1_protein
  glycerol_phosphorylation_by_GLPK: glycerol_c + ATP_c => glycerol3p_c + ADP_c + H_c; k_gly_to_gly3p*glycerol_c; glycerol_phosphorylation_by_GLPK is "Glycerol phosphorylation by GLPK";  // modifiers: GLPK_protein
  glycerol3p_to_glyceronep_by_SDP6: glycerol3p_c => glyceronep_c; k_gly3p_to_glyonep*glycerol3p_c; glycerol3p_to_glyceronep_by_SDP6 is "Glycerol-3P to glyceroneP by SDP6";  // modifiers: SDP6_protein
  DG_acylation_to_TG_by_DSEL: DG_18_0_18_1_c + eicosenoic_c => TG_18_0_18_1_20_1_c; k_DG_acylation*DG_18_0_18_1_c;  // modifiers: DSEL_protein
  quinol_oxidation: quinol_m => quinone_m; k_quinol_oxidation*quinol_m; quinol_oxidation is "Quinol oxidation";
  transport_TG_to_vacuole: TG_18_0_18_1_20_1_c => TG_18_0_18_1_20_1_v; k_transport_TG_vacuole*TG_18_0_18_1_20_1_c; transport_TG_to_vacuole is "Transport TG to vacuole";
  transport_glycerol_to_mito: glycerol_c => glycerol_m; k_transport_glycerol_mito*glycerol_c; transport_glycerol_to_mito is "Transport glycerol to mitochondrion";
end
